*Heading
** Job name: Tri6-SurfaceSet Model name: Model-1
** Generated by: Abaqus/CAE 6.14-4
*Preprint, echo=NO, model=NO, history=NO, contact=NO
**
** PARTS
**
*Part, name=Part-1
*Node
      1,           0.,           0.
      2,           5.,           0.
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*Element, type=CPS6M
  1,   1,   2,  13,  78,  79,  80
  2,  13,  12,   1,  81,  82,  80
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*Nset, nset=Node-Left
  34,  45, 153, 184, 215
*Elset, elset=_Surf-Bottom_S1, internal, generate
 3,  7,  2
*Surface, type=ELEMENT, name=Surf-Bottom
_Surf-Bottom_S1, S1
*End Part
**
**
** ASSEMBLY
**
*Assembly, name=Assembly
**
*Instance, name=Part-1-1, part=Part-1
*End Instance
**
*End Assembly
**
** MATERIALS
**
*Material, name=Material-1
*Elastic
210., 0.3
** ----------------------------------------------------------------
**
** STEP: Step-1
**
*Step, name=Step-1, nlgeom=NO
*Static
1., 1., 1e-05, 1.
**
** OUTPUT REQUESTS
**
*Restart, write, frequency=0
**
** FIELD OUTPUT: F-Output-1
**
*Output, field, variable=PRESELECT
**
** HISTORY OUTPUT: H-Output-1
**
*Output, history, variable=PRESELECT
*End Step
