*Heading
** Job name: doublenotch Model name: Model-1
** Generated by: Abaqus/CAE 6.14-1
*Preprint, echo=NO, model=NO, history=NO, contact=NO
**
** PARTS
**
*Part, name=Part-1
*End Part
**
**
** ASSEMBLY
**
*Assembly, name=Assembly
**
*Instance, name=Part-1-1, part=Part-1
*Node
      1,   1.68181813,   4.09920645
      2,  -78.3181839,   4.09920645
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*Element, type=CPS8R
   1,  833,  810,   13,   14, 2006, 2007, 2008, 2009
   2,   13,  810,  160,    1, 2007, 2010, 2011, 2012
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*End Instance
**
*Nset, nset=Set-18, instance=Part-1-1
    3,    4,    5,    6,   43,   44
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*Elset, elset=Set-18, instance=Part-1-1
    3,    6,   10,   13,   17,   21
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*Nset, nset=bottom, instance=Part-1-1
    9,   10,  202,  203,  204,  205
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*Elset, elset=bottom, instance=Part-1-1
 1609, 1616, 1617, 1620, 1621, 1626, 1711, 1717
*Nset, nset=top, instance=Part-1-1
   11,   12,  225,  226,  227,  228
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*Elset, elset=top, instance=Part-1-1
 1780, 1781, 1786, 1787, 1882, 1890, 1893, 1895
*End Assembly
** ----------------------------------------------------------------
**
** STEP: Step-1
**
*Step, name=Step-1, nlgeom=NO
*Static
1., 1., 1e-05, 1.
**
** BOUNDARY CONDITIONS
**
** Name: bottom Type: Displacement/Rotation
*Boundary
bottom, 1, 1
bottom, 2, 2
** Name: top Type: Displacement/Rotation
*Boundary
top, 1, 1
top, 2, 2, 1.
**
** OUTPUT REQUESTS
**
*Restart, write, frequency=0
**
** FIELD OUTPUT: F-Output-1
**
*Output, field, variable=PRESELECT
**
** HISTORY OUTPUT: H-Output-1
**
*Output, history, variable=PRESELECT
*End Step
