*Heading
** Job name: pk Model name: Model-1
** Generated by: Abaqus/CAE 6.14-1
*Preprint, echo=NO, model=NO, history=NO, contact=NO
**
** PARTS
**
*Part, name=pk
*End Part
**
**
** ASSEMBLY
**
*Assembly, name=Assembly
**
*Instance, name=pk-1, part=pk
*Node
      1, -0.0250000004,  0.224999994
      2, -0.200000003,  0.224999994
      3,       -0.375,  0.224999994
      4, -0.0250000004, 0.0687500015
      5, -0.200000003, 0.0687500015
      6,       -0.375, 0.0687500015
      7, -0.0250000004, -0.0874999985
      8, -0.200000003, -0.0874999985
      9,       -0.375, -0.0874999985
*Element, type=CPS4R
1, 1, 2, 5, 4
2, 2, 3, 6, 5
3, 4, 5, 8, 7
4, 5, 6, 9, 8
*End Instance
**
*Nset, nset=Set-1, instance=pk-1, generate
 7,  9,  1
*Elset, elset=Set-1, instance=pk-1
 3, 4
*Nset, nset=top, instance=pk-1, generate
 1,  3,  1
*Elset, elset=top, instance=pk-1
 1, 2
*End Assembly
** ----------------------------------------------------------------
**
** STEP: Step-1
**
*Step, name=Step-1, nlgeom=NO
*Static
1., 1., 1e-05, 1.
**
** BOUNDARY CONDITIONS
**
** Name: bottom Type: Displacement/Rotation
*Boundary
Set-1, 1, 1
Set-1, 2, 2
** Name: top Type: Displacement/Rotation
*Boundary
top, 1, 1
top, 2, 2, 2.
**
** OUTPUT REQUESTS
**
*Restart, write, frequency=0
**
** FIELD OUTPUT: F-Output-1
**
*Output, field, variable=PRESELECT
**
** HISTORY OUTPUT: H-Output-1
**
*Output, history, variable=PRESELECT
*End Step
